*Heading
** Job name: Job-1 Model name: Model-1
** Generated by: Abaqus/CAE 2023
*Preprint, echo=NO, model=NO, history=NO, contact=NO
**
** PARTS
**
*Part, name=Part-1
*Node
      1,         -15.,          15.,          20.
      2,         -15.,        -77.5,          20.
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*Element, type=C3D10
   1, 1031,  156,  564,  610, 1062, 1061, 1060, 1064, 1063, 1065
   2, 1032,  608,  607,  153, 1068, 1067, 1066, 1070, 1069, 1071
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*Nset, nset=Set-1, generate
    1,  5761,     1
*Elset, elset=Set-1, generate
    1,  2619,     1
** Section: Section-1
*Solid Section, elset=Set-1, material=Material-1
,
*End Part
**
*Part, name=Part-2
*Node
      1,          20.,           3.,          20.
      2,          20.,           0.,          20.
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*Element, type=C3D10
   1,  156,  283,  284,  285,  392,  391,  390,  394,  393,  395
   2,  259,  286,   60,  287,  398,  397,  396,  400,  399,  401
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*Nset, nset=Set-1, generate
    1,  2428,     1
*Elset, elset=Set-1, generate
    1,  1371,     1
** Section: Section-1
*Solid Section, elset=Set-1, material=Material-1
,
*End Part
**
*Part, name=Part-3
*Node
      1,          40.,          10.,          20.
      2,          40.,           0.,          20.
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*Element, type=C3D10
   1,  193,  194,  195,  196,  306,  305,  304,  308,  307,  309
   2,  193,  196,  197,  194,  308,  311,  310,  306,  307,  312
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*Nset, nset=Set-1, generate
    1,  1928,     1
*Elset, elset=Set-1, generate
    1,  1133,     1
** Section: Section-1
*Solid Section, elset=Set-1, material=Material-1
,
*End Part
**
**
** ASSEMBLY
**
*Assembly, name=Assembly
**
*Instance, name=Part-1-1, part=Part-1
*End Instance
**
*Instance, name=Part-2-1, part=Part-2
         90.,         -60.,           0.
         90.,         -60.,           0., 90.5773502691896, -60.5773502691896, 0.577350269189626,         120.
*End Instance
**
*Instance, name=Part-3-1, part=Part-3
       -100.,           0.,          20.
       -100.,           0.,          20., -99.2928932098417, 0.707106790158355,          20.,         180.
*End Instance
**
*Nset, nset=Set-1, instance=Part-3-1
    2,    3,    5,    6,   11,   12
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*Elset, elset=Set-1, instance=Part-3-1
   56,  153,  171,  174,  177,  199
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*Nset, nset=Set-2, instance=Part-3-1
    2,    3,    5,    6,   11,   12
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*Elset, elset=Set-2, instance=Part-3-1
   56,  153,  171,  174,  177,  199
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*Elset, elset=_Surf-Q-Force_S3, internal, instance=Part-2-1
   42,   95,  100,  134,  147,  212
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*Elset, elset=_Surf-Q-Force_S4, internal, instance=Part-2-1
 534, 668
*Surface, type=ELEMENT, name=Surf-Q-Force
_Surf-Q-Force_S3, S3
_Surf-Q-Force_S4, S4
*Elset, elset=_Surf-Side-1_S4, internal, instance=Part-1-1
   22,  681, 2596, 2598
*Elset, elset=_Surf-Side-1_S2, internal, instance=Part-1-1
   25,   27,  364,  602, 1968
*Elset, elset=_Surf-Side-1_S3, internal, instance=Part-1-1
  407,  704, 1551, 1992, 2002, 2003, 2140
*Surface, type=ELEMENT, name=Surf-Side-1
_Surf-Side-1_S4, S4
_Surf-Side-1_S2, S2
_Surf-Side-1_S3, S3
*Elset, elset=_Surf-Side-2_S3, internal, instance=Part-1-1
    4,   10,  401,  503,  504,  976, 1317, 1326, 2245, 2275, 2301, 2311
*Elset, elset=_Surf-Side-2_S2, internal, instance=Part-1-1
  24, 497
*Elset, elset=_Surf-Side-2_S1, internal, instance=Part-1-1
 1769, 2299
*Surface, type=ELEMENT, name=Surf-Side-2
_Surf-Side-2_S3, S3
_Surf-Side-2_S2, S2
_Surf-Side-2_S1, S1
*Elset, elset=_Surf-Wall_S3, internal, instance=Part-3-1
   99,  100,  107,  170,  182,  185
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*Elset, elset=_Surf-Wall_S4, internal, instance=Part-3-1
  491,  792, 1033
*Elset, elset=_Surf-Wall_S2, internal, instance=Part-3-1
  798,  823,  914, 1069
*Surface, type=ELEMENT, name=Surf-Wall
_Surf-Wall_S3, S3
_Surf-Wall_S4, S4
_Surf-Wall_S2, S2
*Elset, elset=_Surf-Wall-2_S3, internal, instance=Part-2-1
   42,   95,  100,  102,  134,  147
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*Elset, elset=_Surf-Wall-2_S4, internal, instance=Part-2-1
  534,  668, 1367
*Surface, type=ELEMENT, name=Surf-Wall-2
_Surf-Wall-2_S3, S3
_Surf-Wall-2_S4, S4
*End Assembly
*Amplitude, name=Amp-1
             0.,              0.,              1.,              1.
**
** MATERIALS
**
*Material, name=Material-1
*Density
7850.,
*Elastic
 1.99948e+11, 0.3
*Plastic
 2.482e+08,     0.
   2.9e+08, 0.0005
   3.2e+08, 0.0009
   3.4e+08,  0.001
   3.8e+08,  0.007
   4.1e+08,  0.009
   4.4e+08,   0.01
**
** INTERACTION PROPERTIES
**
*Surface Interaction, name=IntProp-1
*Friction
 0.5,
*Surface Behavior, pressure-overclosure=HARD
** ----------------------------------------------------------------
**
** STEP: Step-1
**
*Step, name=Step-1, nlgeom=YES
*Dynamic, Explicit
, 1.
*Bulk Viscosity
0.06, 1.2
**
** BOUNDARY CONDITIONS
**
** Name: BC-1 Type: Symmetry/Antisymmetry/Encastre
*Boundary
Set-2, ENCASTRE
**
** LOADS
**
** Name: Load-1   Type: Pressure
*Dsload, amplitude=Amp-1
Surf-Q-Force, P, 10000.
**
** OUTPUT REQUESTS
**
*Restart, write, number interval=1, time marks=NO
**
** FIELD OUTPUT: F-Output-1
**
*Output, field, variable=PRESELECT
**
** HISTORY OUTPUT: H-Output-1
**
*Output, history, variable=PRESELECT
*End Step
